*Part, name=Part-6
*Node
1, 0.0250000004, 0.0
2, 0.0, 0.0
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*Element, type=CPE4
1, 1, 9, 46, 4
2, 9, 10, 45, 46
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*Element, type=COH2D4
*Nset, nset=Set-1
   1,   2,   5,   6,   9,  10
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*Nset, nset=Set-2
   1,   2,   3,   4,   5,   6
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*Elset, elset=Set-2
   1,   2,   3,   4,   5,   6
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*Elset, elset=Set-1, generate
  21,  420,    1
*Elset, elset=CZE, generate
441, 440,  1
** Section: rock
*Solid Section, elset=Set-2, material=Steel
** Section: rock
*Solid Section, elset=Set-1, material=Steel
** Section: cohe
*Cohesive Section, elset=CZE, material=concrete, response=TRACTION SEPARATION
1,
*End Part
**
**
** ASSEMBLY
**
*Assembly, name=Assembly
**
*Instance, name=Part-6-1, part=Part-6
*End Instance
**
*Nset, nset=Set-2, instance=Part-6-1
  3, 484,   4, 28, 29, 30
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*Nset, nset=Set-1, instance=Part-6-1
 3, 484,
*Elset, elset=_Surf-1_S4, internal, instance=Part-6-1, generate
   1,  421,   20
*Elset, elset=_Surf-1_S3, internal, instance=Part-6-1, generate
 421,  440,    1
*Elset, elset=Set-2, instance=Part-6-1, generate
  1,  20,   1
*Elset, elset=_Surf-2_S3, internal, instance=Part-6-1, generate
 421,  440,    1
*Elset, elset=_Surf-1_S2, internal, instance=Part-6-1, generate
  20,  440,   20
*Surface, type=ELEMENT, name=Surf-1
_Surf-1_S2, S2
_Surf-1_S4, S4
_Surf-1_S3, S3
*Surface, type=ELEMENT, name=Surf-2
_Surf-2_S3, S3
*Elset, elset=Element1, instance=Part-6-1
1
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*End Assembly
**
** MATERIALS
**
*Material, name=Steel
*Elastic
 4.6e+10, 0.2
*Material, name=cohe
*Damage Initiation, criterion=MAXS
 4e+07, 5e+07, 5e+07
*Damage Evolution, type=ENERGY
23680.,
*Elastic, type=TRACTION
 2.3e+12, 9.7e+11, 9.7e+11
*Material, name=rock
*Depvar
     28,
*User Material, constants=12
 4.6e+10,     0.186,  7.35e-13,  1.21e-10, -3.15e-11,  2.39e-12,    10000.,  1.18e+06
     0.399,        0.,        0.,        0.
**
** INTERACTION PROPERTIES
**
*Surface Interaction, name=IntProp-1
1.,
*Friction
0.,
*Surface Behavior, pressure-overclosure=HARD
**
** BOUNDARY CONDITIONS
**
** Name: BC-1 Type: Displacement/Rotation
*Boundary
Set-1, 1, 1
Set-1, 2, 2
** Name: BC-2 Type: Displacement/Rotation
*Boundary
Set-2, 2, 2
** ----------------------------------------------------------------
**
** STEP: Step-1
**
*Step, name=Step-1, nlgeom=YES, inc=1000000000
*Static
0.01, 1., 1e-30, 0.05
**
** LOADS
**
** Name: Load-1   Type: Pressure
*Dsload
Surf-1, P, 1e+07
**
** CONTROLS
**
*Controls, reset
*Controls, analysis=discontinuous
*Controls, parameters=time incrementation
, , , , , , , 15, , ,
**
** OUTPUT REQUESTS
**
*Restart, write, frequency=0
**
** FIELD OUTPUT: F-Output-1
**
*Output, field
*Node Output
U,
*Element Output, directions=YES
DMICRT, E, LE, S, SDEG, SDV
**
** HISTORY OUTPUT: H-Output-1
**
*Output, history, variable=PRESELECT
*End Step
** ----------------------------------------------------------------
**
** STEP: Step-2
**
*Step, name=Step-2, nlgeom=YES, inc=1000000000
*Static, stabilize=0.0002, allsdtol=0.05, continue=NO
0.005, 1., 1e-50, 0.01
**
** LOADS
**
** Name: Load-2   Type: Pressure
*Dsload
Surf-2, P, 4e+07
**
** OUTPUT REQUESTS
**
*Restart, write, frequency=0
**
** FIELD OUTPUT: F-Output-1
**
*Output, field
*Node Output
U,
*Element Output, directions=YES
DMICRT, E, LE, S, SDEG, SDV
**
** HISTORY OUTPUT: H-Output-1
**
*Output, history, variable=PRESELECT
*End Step
