*Heading
** Job name: Multi_path Model name: Mode_I_multi
** Generated by: Abaqus/CAE 6.12-1
*Preprint, echo=NO, model=NO, history=NO, contact=NO
**
** PARTS
**
*Part, name=Part-1
*Node
      1,   20.9752846,          15.
      2,   18.0008621,   11.3819418
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*Element, type=CPE4
  1,   1,  21, 355,  67
  2,  21,  22, 356, 355
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*Nset, nset=Set-1, generate
    1,  2707,     1
*Elset, elset=Set-1, generate
    1,  2605,     1
** Section: Section-1
*Solid Section, elset=Set-1, material=Elastic
1.,
*End Part
**
**
** ASSEMBLY
**
*Assembly, name=Assembly
**
*Instance, name=Part-1-1, part=Part-1
*End Instance
**
*Nset, nset=Set-5, instance=Part-1-1
  13,  14, 184, 185, 186, 187, 188, 189, 190, 191, 192
*Elset, elset=Set-5, instance=Part-1-1
  835,  836,  837,  891,  892,  893, 1102, 1112, 1208, 1209
*Nset, nset=Set-6, instance=Part-1-1
   9,  10, 128, 129, 130, 131, 132, 133, 134, 135, 136
*Elset, elset=Set-6, instance=Part-1-1
 180, 208, 237, 241, 242, 251, 304, 307, 322, 394
*Nset, nset=_PickedSet26, internal, instance=Part-1-1
    1,    2,    3,    4,    5,    6
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*Elset, elset=_PickedSet26, internal, instance=Part-1-1, generate
    1,  1680,     1
*Nset, nset=Set-1, instance=Part-1-1
   2,   3,   4,   6,   7,   8
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*Elset, elset=Set-1, instance=Part-1-1
    8,    9,   10,   11,   12,   13
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*Nset, nset=Set-4, instance=Part-1-1
 17, 18, 20
*Nset, nset=Set-3, instance=Part-1-1
  17,  18,  20, 262, 263, 264
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*Elset, elset=Set-3, instance=Part-1-1
 1696, 1698, 1701, 1703, 1704, 1705
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*End Assembly
**
** MATERIALS
**
*Material, name=Elastic
*Elastic
 1.7e+10, 0.2
*Material, name=concrete
*Damage Initiation, criterion=MAXPS, tolerance=0.1
 1.65e+06,
*Damage Evolution, type=ENERGY, mixed mode behavior=POWER LAW, power=1.
 40.293, 40.293, 40.293
*Damage Stabilization
1e-05
*Elastic, type=TRACTION
 8.5e+11, 8.5e+11, 8.5e+11
**
** BOUNDARY CONDITIONS
**
** Name: BC-1 Type: Displacement/Rotation
*Boundary
Set-3, 1, 1
** Name: BC-2 Type: Displacement/Rotation
*Boundary
Set-4, 2, 2
** ----------------------------------------------------------------
**
** STEP: Step-1
**
*Step, name=Step-1, inc=100000
*Static, stabilize=0.0002, allsdtol=0.05, continue=NO
0.005, 1., 1e-10, 0.005
**
** BOUNDARY CONDITIONS
**
** Name: BC-3 Type: Displacement/Rotation
*Boundary
Set-5, 2, 2, -0.005
** Name: BC-4 Type: Displacement/Rotation
*Boundary
Set-6, 2, 2, 0.005
**
** CONTROLS
**
*Controls, reset
*Controls, analysis=discontinuous
*Controls, parameters=time incrementation
, , , , , , , 15, , ,
**
** OUTPUT REQUESTS
**
*Restart, write, frequency=0
**
** FIELD OUTPUT: F-Output-1
**
*Output, field
*Node Output
U,
*Element Output, directions=YES
E, S, SDEG
**
** HISTORY OUTPUT: H-Output-1
**
*Output, history, variable=PRESELECT
*End Step
